// COMSOL Multiphysics 5.4.0.388 model "Problem_1_PSet5.mph"
// Outline of the model tree

Parameters
  L = 1 [m]  // Length of rod

Variables
  var1 "Variables 1"

Geometry
  geom1 "Geometry 1" (1D, length unit m)
    i1: Interval "Rod of Cooling"
    fin: Finalize "Form Union"

Physics
  c: CoefficientFormPDE on all domains
    dependent variable u
    Units.DependentVariableQuantity = temperature
    Units.SourceTermQuantity = displacement
    cfeq1: CoefficientFormPDE (default) | c = 1; f = 0; ea = 0; da = 1
    zflx1: ZeroFluxBoundary "Zero Flux 1" (default)
    init1: init "Initial Values 1" (default) | u = 1
    dir1: DirichletBoundary "Temp Boundary" on boundaries 1, 2 | r = 0

Mesh
  mesh1 "Mesh 1" (physics-controlled)
    size: MeshSizeDefault | hauto = 1

Studies
  std1 "Study 1"
    time: Transient "Time Dependent" | tlist = range(0,0.1,1)

Solver configurations
  sol1 "Solution 1" (study std1)
    v1: Variables "Dependent Variables 1"
    t1: Time "Time-Dependent Solver 1" | tlist = range(0,0.1,1)
      dDef: Direct
      fc1: FullyCoupled | linsolver = dDef

Datasets
  dset1: Solution | solution = sol1

Plots
  pg1: PlotGroup1D "1D Plot Group 1" | data = dset1
    lngr1: LineGraph on all domains | expr = u; xdata = expr; xdataexpr = x